// COMSOL Multiphysics 6.0.0.318 model "strip waveguide compressed.mph"
// Outline of the model tree

Parameters
  L = 1000[um]
  w_strip = 0.8[um]
  t_strip = 0.3[um]
  t_slab = 2[um]
  w_slab = 10[um]
  l_slab = 1000[um]
  eps0 = 3e-4
  l_etch = 300[um]
  r_etch = 5[um]

Geometry
  geom1 "Geometry 1" (3D, length unit µm)
    blk1: Block | pos = {0, -w_strip/2, 0}; size = {L, w_strip, t_strip}
    blk2: Block | pos = {0, -w_slab/2, -t_slab}; size = {l_slab, w_slab, t_slab}
    cyl1: Cylinder | pos = {l_etch/2, 0, r_etch-t_slab/2}; axistype = x; r = r_etch; h = l_etch
    dif1: Difference | input = blk2; input2 = cyl1
    blk3: Block | pos = {0, -5, -10-t_slab}; ax2 = {0.0, 0.0}; size = {1000, 10, 10}
    fin: Finalize "Form Union"

Materials
  mat2: Common "LiNbO3 (Lithium niobate) (Zelmon et al. 1997: n(o) 0.4-5.0 um) 1" on domains 3
    DispersionModelSellmeierStandard "Sellmeier"
      ODsma = {2.6734, 1.2290, 12.614, 0.01764, 0.05914, 474.60}
      Trefsma = 22[degC]
      Prefsma = 0
    RefractiveIndex
      ki = 0
  mat3: Common "SiO2 (fused quartz) [solid,NIST SRM 739, Type I]" on domains 2
    def "Basic"
      thermalconductivity = k_solid_1(T)
      resistivity = res_solid_1(T)
      thermalexpansioncoefficient = (alpha_solid_NIST_SRM_739_Type_I_1(T)+(Tempref-293[K])*if(abs(T-Tempref)>1e-3,(alpha_solid_NIST_SRM_739_Type_I_1(T)-alpha_solid_NIST_SRM_739_Type_I_1(Tempref))/(T-Tempref),d(alpha_solid_NIST_SRM_739_Type_I_1(T),T)))/(1+alpha_solid_NIST_SRM_739_Type_I_1(Tempref)*(Tempref-293[K]))
      heatcapacity = C_solid_1(T)
      electricconductivity = sigma_solid_1(T)
      HC = HC_solid_1(T)
      emissivity = epsilon(T)
      density = rho(T)
      TD = TD(T)
      k_solid_1: Piecewise
        arg = T
        pieces = 
          {5.0, 280.0, 0.09229359+0.003299521*T^1+4.343238E-5*T^2-2.258807E-7*T^3+3.049078E-10*T^4}
          {280.0, 1400.0, -0.9854696+0.01820907*T^1-5.290512E-5*T^2+7.552525E-8*T^3-5.008123E-11*T^4+1.311324E-14*T^5}
          {1400.0, 1473.0, -1798.509+4.192721*T^1-0.003251176*T^2+8.408144E-7*T^3}
        argunit = K
        fununit = W/(m*K)
      res_solid_1: Piecewise | arg = T; pieces = {293.0, 823.0, exp(2.719273E-10*T^4 - 7.491946E-07*T^3 + 8.035453E-04*T^2 - 4.185428E-01*T + 1.025761E+02)}; argunit = K; fununit = ohm*m
      alpha_solid_NIST_SRM_739_Type_I_1: Piecewise | arg = T; pieces = {80.0, 1000.0, -3.695793E-7+5.412844E-9*T^1-1.114924E-11*T^2+1.004725E-14*T^3-3.418476E-18*T^4}; argunit = K; fununit = 1/K
      C_solid_1: Piecewise
        arg = T
        pieces = 
          {10.0, 130.0, -8.36154589+0.814240642*T^1+0.0499209927*T^2-4.46234817E-4*T^3+1.68051105E-6*T^4-2.285317E-9*T^5}
          {130.0, 925.0, 62.3090907+1.92679385*T^1+0.00446363032*T^2-1.70427118E-5*T^3+1.88108948E-8*T^4-7.06246723E-12*T^5}
          {925.0, 2000.0, 890.996034+0.370745925*T^1-1.10760366E-4*T^2+3.13943706E-8*T^3}
        argunit = K
        fununit = J/(kg*K)
      sigma_solid_1: Piecewise | arg = T; pieces = {293.0, 823.0, 1/(exp(2.719273E-10*T^4-7.491946E-07*T^3+8.035453E-04*T^2-4.185428E-01*T+1.025761E+02))}; argunit = K; fununit = S/m
      HC_solid_1: Piecewise
        arg = T
        pieces = 
          {10.0, 135.0, -0.851317321+0.073081305*T^1+0.00324458398*T^2-3.75532087E-5*T^3+1.9840749E-7*T^4-5.03858518E-10*T^5+4.95479711E-13*T^6}
          {135.0, 925.0, 3.73276326+0.115412856*T^1+2.69721447E-4*T^2-1.02702823E-6*T^3+1.13306295E-9*T^4-4.25343745E-13*T^5}
          {925.0, 2000.0, 53.787722+0.0216572752*T^1-6.25110989E-6*T^2+1.80014473E-9*T^3}
        argunit = K
        fununit = J/(mol*K)
      epsilon: Piecewise | arg = T; pieces = {75.0, 312.0, 0.7243795+5.530512E-5*T^1}; argunit = K
      rho: Piecewise | arg = T; pieces = {80.0, 1000.0, 2219.39+0.01105999*T^1-4.708012E-5*T^2+6.980692E-8*T^3-4.995273E-11*T^4+1.430874E-14*T^5}; argunit = K; fununit = kg/m^3
      TD: Piecewise | arg = T; pieces = {82.0, 1039.0, 1.559138E-6-4.991949E-9*T^1+1.170891E-11*T^2-1.277613E-14*T^3+5.492523E-18*T^4}; argunit = K; fununit = m^2/s
    ThermalExpansion
      alphatan = CTE_solid_NIST_SRM_739_Type_I_1(T)
      dL = (dL_solid_NIST_SRM_739_Type_I_1(T)-dL_solid_NIST_SRM_739_Type_I_1(Tempref))/(1+dL_solid_NIST_SRM_739_Type_I_1(Tempref))
      dL_solid_NIST_SRM_739_Type_I_1: Piecewise | arg = T; pieces = {80.0, 1000.0, 9.433058E-5-1.712933E-6*T^1+7.374643E-9*T^2-1.113379E-11*T^3+8.078969E-15*T^4-2.330577E-18*T^5}; argunit = K
      CTE_solid_NIST_SRM_739_Type_I_1: Piecewise | arg = T; pieces = {80.0, 1000.0, -1.712933E-6+1.474929E-8*T^1-3.340137E-11*T^2+3.231588E-14*T^3-1.165288E-17*T^4}; argunit = K; fununit = 1/K
    Enu "Young's modulus and Poisson's ratio"
      E = E(T)
      nu = nu(T)
      E: Piecewise
        arg = T
        pieces = 
          {2.0, 170.0, 7.19219E10-7.955576E7*T^1+1200039.0*T^2-7440.215*T^3+21.72957*T^4-0.02394189*T^5}
          {170.0, 1700.0, 6.906825E10+1.167539E7*T^1+11447.54*T^2-25.91953*T^3+0.01545627*T^4-3.022226E-6*T^5}
        argunit = K
        fununit = Pa
      nu: Piecewise
        arg = T
        pieces = 
          {2.0, 170.0, 0.1623859-3.46611E-4*T^1+5.42002E-6*T^2-2.78502E-8*T^3+4.878708E-11*T^4}
          {170.0, 950.0, 0.1442531+2.285363E-4*T^1-9.253567E-7*T^2+1.832686E-9*T^3-1.635196E-12*T^4+5.369587E-16*T^5}
          {950.0, 1700.0, 0.04194888+4.230553E-4*T^1-4.739473E-7*T^2+2.308844E-10*T^3-4.040605E-14*T^4}
        argunit = K
    KG "Bulk modulus and shear modulus"
      K = kappa(T)
      G = mu(T)
      mu: Piecewise
        arg = T
        pieces = 
          {2.0, 170.0, 3.093791E10-2.513966E7*T^1+372325.4*T^2-2429.327*T^3+7.746996*T^4-0.009450154*T^5}
          {170.0, 450.0, 3.087221E10-6676611.0*T^1+36600.0*T^2-35.83581*T^3}
          {450.0, 1700.0, 2.914548E10+9388166.0*T^1-8173.552*T^2+3.504887*T^3-5.616985E-4*T^4}
        argunit = K
        fununit = Pa
      kappa: Piecewise
        arg = T
        pieces = 
          {2.0, 170.0, 3.548804E10-7.249187E7*T^1+1081126.0*T^2-5664.153*T^3+10.51074*T^4}
          {170.0, 950.0, 3.234657E10+2.830576E7*T^1-87346.28*T^2+175.3606*T^3-0.1614875*T^4+5.404807E-5*T^5}
          {950.0, 1700.0, 1.341176E10+8.005859E7*T^1-86531.61*T^2+41.37606*T^3-0.007122425*T^4}
        argunit = K
        fununit = Pa
  mat4: Common "Silicon [solid,bulk]" on domains 1
    def "Basic"
      thermalconductivity = k_solid_bulk_1(T)
      thermalexpansioncoefficient = (alpha_solid_1(T)+(Tempref-293[K])*if(abs(T-Tempref)>1e-3,(alpha_solid_1(T)-alpha_solid_1(Tempref))/(T-Tempref),d(alpha_solid_1(T),T)))/(1+alpha_solid_1(Tempref)*(Tempref-293[K]))
      heatcapacity = C_solid_1(T)
      HC = HC_solid_1(T)
      VP = VP_solid_1(T)
      density = rho_solid_1(T)
      TD = TD(T)
      k_solid_bulk_1: Piecewise
        arg = T
        pieces = 
          {0.0, 8.0, -0.406206941*T^1+1.54347416*T^2+5.72340003*T^3-0.360410839*T^4}
          {8.0, 35.0, 2949.8216-1163.23965*T^1+195.295252*T^2-10.9360825*T^3+0.264809177*T^4-0.00239605603*T^5}
          {35.0, 100.0, 14138.4026-506.811513*T^1+8.44037147*T^2-0.0686071467*T^3+2.16291919E-4*T^4}
          {100.0, 277.0, 5060.89617-79.3110489*T^1+0.506192789*T^2-0.00146949269*T^3+1.6078467E-6*T^4}
          {277.0, 910.0, 815.20065-4.75948613*T^1+0.012665271*T^2-1.73265686E-5*T^3+1.18405229E-8*T^4-3.20443536E-12*T^5}
          {910.0, 1410.0, 272.62027-0.7587*T^1+0.00109795455*T^2-9.29166667E-7*T^3+4.31818182E-10*T^4-8.33333334E-14*T^5}
          {1410.0, 1685.0, 13688.827-45.7712081*T^1+0.0611951725*T^2-4.0805664E-5*T^3+1.35662871E-8*T^4-1.79867623E-12*T^5}
        argunit = K
        fununit = W/(m*K)
      alpha_solid_1: Piecewise
        arg = T
        pieces = 
          {0.0, 30.0, 7.35637E-7+2.453566E-9*T^1+1.20482E-11*T^2}
          {30.0, 130.0, 7.713685E-7+2.098318E-10*T^1+4.628581E-11*T^2+7.569451E-14*T^3-8.713366E-16*T^4}
          {130.0, 293.0, -3.223163E-7+2.257142E-8*T^1-9.684044E-11*T^2+2.835316E-13*T^3-3.440569E-16*T^4}
          {293.0, 1000.0, 6.772622E-7+9.501405E-9*T^1-1.271286E-11*T^2+8.584038E-15*T^3-2.241706E-18*T^4}
        argunit = K
        fununit = 1/K
      C_solid_1: Piecewise
        arg = T
        pieces = 
          {1.0, 7.0, -4.8321811E-5+7.68448084E-5*T^1-3.41813386E-5*T^2+2.80830708E-4*T^3-3.12897302E-7*T^4}
          {7.0, 20.0, 0.0525075264-0.0396481488*T^1+0.0100460936*T^2-7.81251542E-4*T^3+3.9615568E-5*T^4}
          {20.0, 50.0, -1.80567549+0.761903471*T^1-0.0865373791*T^2+0.0037353614*T^3-3.33397563E-5*T^4}
          {50.0, 293.0, -82.9482602+2.71223532*T^1+0.0140475122*T^2-7.97769138E-5*T^3+1.07990546E-7*T^4}
          {293.0, 900.0, 63.0442191+3.7706731*T^1-0.00694853616*T^2+5.9532044E-6*T^3-1.91438418E-9*T^4}
          {900.0, 1685.0, 769.459775+0.187175131*T^1-3.18395957E-5*T^2}
        argunit = K
        fununit = J/(kg*K)
      HC_solid_1: Piecewise
        arg = T
        pieces = 
          {1.0, 7.0, -1.35714274E-6+2.15822519E-6*T^1-9.59999972E-7*T^2+7.88727095E-6*T^3-8.78787695E-9*T^4}
          {7.0, 20.0, 0.00147469975-0.00111353813*T^1+2.82149588E-4*T^2-2.19418374E-5*T^3+1.11262309E-6*T^4}
          {20.0, 50.0, -0.0507133017+0.0213984404*T^1-0.00243044543*T^2+1.0490949E-4*T^3-9.36363719E-7*T^4}
          {50.0, 293.0, -2.32964367+0.0761744898*T^1+3.9453141E-4*T^2-2.2405751E-6*T^3+3.03296821E-9*T^4}
          {293.0, 900.0, 1.3923419+0.109040605*T^1-2.04395094E-4*T^2+1.78689895E-7*T^3-5.88857415E-11*T^4}
          {900.0, 1685.0, 22.0332118+0.0045851661*T^1-6.45226774E-7*T^2}
        argunit = K
        fununit = J/(mol*K)
      VP_solid_1: Piecewise | arg = T; pieces = {293.0, 1687.0, exp(-28983.2381+18690.8144*T^1-4934.14352*T^2+662.645789*T^3-45.0342817*T^4+1.23403537*T^5)}; argunit = K; fununit = Pa
      rho_solid_1: Piecewise
        arg = T
        pieces = 
          {0.0, 30.0, 2331.507-7.113612E-5*T^1+3.674386E-6*T^2}
          {30.0, 130.0, 2331.592-0.005873649*T^1+1.206114E-4*T^2-5.479876E-7*T^3+1.606517E-10*T^4}
          {130.0, 293.0, 2330.436+0.02130626*T^1-9.544145E-5*T^2+4.607415E-8*T^3+4.840886E-11*T^4}
          {293.0, 1000.0, 2332.565+0.003839515*T^1-5.433308E-5*T^2+4.287211E-8*T^3-1.366545E-11*T^4}
        argunit = K
        fununit = kg/m^3
      TD: Piecewise
        arg = T
        pieces = 
          {1.0, 12.0, 12.40366-2.652049*T^1+0.5813105*T^2-0.08018325*T^3+0.005288731*T^4-1.314169E-4*T^5}
          {12.0, 36.0, 12.40379-1.240777*T^1+0.03837706*T^2-9.696578E-6*T^3-1.861403E-5*T^4+2.36465E-7*T^5}
          {36.0, 70.0, 2.231412-0.1770592*T^1+0.005725565*T^2-9.331438E-5*T^3+7.623105E-7*T^4-2.489437E-9*T^5}
          {70.0, 164.0, 0.08907341-0.003083678*T^1+4.419818E-5*T^2-3.22047E-7*T^3+1.182074E-9*T^4-1.739399E-12*T^5}
          {164.0, 303.0, 0.01190219-2.287791E-4*T^1+1.824052E-6*T^2-7.358192E-9*T^3+1.487663E-11*T^4-1.200563E-14*T^5}
          {303.0, 733.0, 7.622018E-4-5.322058E-6*T^1+1.632442E-8*T^2-2.584688E-11*T^3+2.077321E-14*T^4-6.740584E-18*T^5}
          {733.0, 1000.0, -2.043535E-4+1.357482E-6*T^1-2.753022E-9*T^2+2.336409E-12*T^3-7.219021E-16*T^4}
        argunit = K
        fununit = m^2/s
    ThermalExpansion
      alphatan = CTE_solid_1(T)
      dL = (dL_solid_1(T)-dL_solid_1(Tempref))/(1+dL_solid_1(Tempref))
      dL_solid_1: Piecewise
        arg = T
        pieces = 
          {0.0, 30.0, -2.154537E-4}
          {30.0, 130.0, -2.276144E-4+8.396104E-7*T^1-1.724143E-8*T^2+7.834799E-11*T^3-2.303956E-14*T^4}
          {130.0, 293.0, -5.217231E-5-3.263667E-6*T^1+1.532991E-8*T^2-1.223001E-11*T^3}
          {293.0, 1000.0, -5.844527E-4+1.124129E-6*T^1+3.311476E-9*T^2-1.161022E-12*T^3}
        argunit = K
      CTE_solid_1: Piecewise
        arg = T
        pieces = 
          {0.0, 35.0, -1.128708E-10+4.013852E-10*T^1-1.52474E-10*T^2+1.935922E-11*T^3-8.512984E-13*T^4+9.848876E-15*T^5}
          {35.0, 121.0, -4.536302E-7+5.088778E-8*T^1-1.847617E-9*T^2+2.348401E-11*T^3-1.242463E-13*T^4+2.442997E-16*T^5}
          {121.0, 293.0, 8.574679E-8-3.514147E-8*T^1+4.332654E-10*T^2-1.449023E-12*T^3+1.630929E-15*T^4}
          {293.0, 1000.0, -2.621356E-6+3.020773E-8*T^1-5.538848E-11*T^2+4.755059E-14*T^3-1.534596E-17*T^4}
        argunit = K
        fununit = 1/K

Physics
  solid: SolidMechanics on all domains
    dependent variable u = {u, v, w}
    ShapeProperty.order_displacement = 2s
    lemm1: LinearElasticModel "Linear Elastic Material 1" (default)
      SolidModel = Isotropic
      D_mat = from_mat
      IsotropicOption = Enu
      E_mat = from_mat
      nu_mat = from_mat
      ForceLinearStrainRes = 0
      iss1: InitialStressandStrain on all domains | eil = diag{-eps0, 0, 0}
    free1: Free (default)
    init1: init "Initial Values 1" (default)
    lemm2: LinearElasticModel "Linear Elastic Material 2" on domains 3
      E_mat = userdef
      E = 200e9[Pa]
      nu_mat = userdef
      nu = 0.30
    lemm3: LinearElasticModel "Linear Elastic Material 3" on domains 2
      E_mat = userdef
      E = 70e9
      nu_mat = userdef
      nu = 0.17
    lemm4: LinearElasticModel "Linear Elastic Material 4" on domains 1
      E_mat = userdef
      E = 130e9
      nu_mat = userdef
      nu = 0.28
    fix1: Fixed "Fixed Constraint 1" on boundaries 1, 4, 5, 7-13, 15, 18, 21, 23, 24
    epdm1: ElasticPredeformation on domains 3 | PredeformationGradient = userdef; Fpd = diag{1-eps0, 1, 1}

Mesh
  mesh1 "Mesh 1"
    size: MeshSizeDefault | hauto = 4
    auto_f1: FreeTet "Free Tetrahedral 1" on remaining entities | optcurved = on

Studies
  std1 "Study 1"
    stat: Stationary

Solver configurations
  sol1 "Solution 1" (study std1)
    v1: Variables "Dependent Variables 1"
    s1: Stationary "Stationary Solver 1"
      fc1: FullyCoupled | linsolver = d1
      d1: Direct "Suggested Direct Solver (solid)" | linsolver = pardiso; pivotperturb = 1.0E-9; nliniterrefine = on

Datasets
  dset1: Solution | solution = sol1

Plots
  pg1: PlotGroup3D "Stress (solid)" | data = dset1
    vol1: Volume | expr = solid.mises
      def: Deform "Deformation" | expr = {u, v, w}; descr = Displacement field
  pg2: PlotGroup3D "3D Plot Group 2" | data = dset1
    surf1: Surface | expr = solid.eXZ; descr = Strain tensor, XZ component
      sel1: Selection on boundaries 11